log log.lammps_rerun

variable gew equal 0.35

units               real
dimension           3
#newton off
processors * * 2
boundary p p f
atom_style          full
log log.lammps_rerun_${gew}

##force field
pair_style          lj/cut/coul/long 16.0
pair_modify         mix arithmetic
bond_style          harmonic
angle_style         harmonic
kspace_style        pppm/conp 1e-8
kspace_modify       gewald ${gew} slab 3.0
#kspace_modify slab 3.0

##atom definition
read_data           data

variable molmax   equal 646
variable molleft  equal 641
variable molright equal 642

neigh_modify one 3000
group sol type 1:4
variable q atom q
variable etype equal 5
group ele           type ${etype}
group eleleft       molecule ${molleft}
group eleright      molecule ${molright}
compute qleft       eleleft  reduce sum v_q
compute qright      eleright reduce sum v_q
compute tempsl      sol      temp

variable eta equal 1.979

compute potele      ele      potential/atom eta ${eta} ${molleft} ${molright}
compute poteleb     ele      potential/atom eta ${eta} ${molleft} ${molright} pair
#compute potele ele potential/atom pair

variable pot1a   equal    c_potele[1698]
variable pot2a   equal    c_potele[2837]
variable potda   equal    v_pot2a-v_pot1a
variable pot1b   equal    c_poteleb[1698]
variable pot2b   equal    c_poteleb[2837]
variable potdb   equal    v_pot2b-v_pot1b

#variable v equal 1.0
#fix e all conp 1 1.979 ${molleft} ${molright} -$v $v inv iter etypes 1 ${etype} pppm

#thermo_style custom step temp c_tempsl c_qleft c_qright v_pot1 v_pot2 v_potd
#thermo_style custom c_qleft c_qright
thermo_style custom step v_pot1a v_pot2a v_potda v_pot1b v_pot2b v_potdb
thermo 1

rerun sol2.traj dump x y z q
